*Heading
** Job name: UserMat-Job-Verbund Model name: Model-1
** Generated by: Abaqus/CAE 2017
*Preprint, echo=NO, model=NO, history=NO, contact=NO
**
** PARTS
**
*Part, name=Lochscheibe
*Node
      1,  -10.6066017,  -10.6066017,          10.
      2,  -10.6066017,  -10.6066017,           0.
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*Element, type=C3D8
  1,    1,   53,  721,   70,   95,  821, 3289,  761
  2,   53,   54,  722,  721,  821,  822, 3290, 3289
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*Nset, nset=Set-6, generate
    1,  6168,     1
*Elset, elset=Set-6, generate
    1,  4780,     1
*Orientation, name=Ori-1
0.707106781186547, 0.707106781186547,           0., -0.707106781186547, 0.707106781186547,           0.
3, 0.
** Section: Section-1
*Solid Section, elset=Set-6, orientation=Ori-1, stack direction=2, material=Material-1
,
*End Part
**
**
** ASSEMBLY
**
*Assembly, name=Assembly
**
*Instance, name=Lochscheibe-1, part=Lochscheibe
*End Instance
**
*Nset, nset=_PickedSet16, internal, instance=Lochscheibe-1
   41,   42,   43,   44,   49,   50
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*Elset, elset=_PickedSet16, internal, instance=Lochscheibe-1
 2861, 2862, 2863, 2864, 2865, 2926
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*Nset, nset=_PickedSet17, internal, instance=Lochscheibe-1
   45,   46,   47,   48,   51,   52
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*Elset, elset=_PickedSet17, internal, instance=Lochscheibe-1
 3251, 3252, 3253, 3254, 3255, 3316
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*Nset, nset=_PickedSet18, internal, instance=Lochscheibe-1
 47,
*Nset, nset=_PickedSet19, internal, instance=Lochscheibe-1
 52,
*End Assembly
**
** MATERIALS
**
*Material, name=Material-1
*User Material, constants=5
114400, 28800, 40800, 18800, 5500
**
** BOUNDARY CONDITIONS
**
** Name: x0 Type: Displacement/Rotation
*Boundary
_PickedSet17, 1, 1
** Name: yz0 Type: Displacement/Rotation
*Boundary
_PickedSet18, 2, 2
_PickedSet18, 3, 3
** Name: z0 Type: Displacement/Rotation
*Boundary
_PickedSet19, 3, 3
** ----------------------------------------------------------------
**
** STEP: Zugbelastung
**
*Step, name=Zugbelastung, nlgeom=NO
*Static
1., 1., 1e-05, 1.
**
** BOUNDARY CONDITIONS
**
** Name: Verschiebung Type: Displacement/Rotation
*Boundary
_PickedSet16, 1, 1, 0.5
**
** OUTPUT REQUESTS
**
*Restart, write, frequency=0
*Print, solve=NO
**
** FIELD OUTPUT: F-Output-1
**
*Output, field
*Node Output
U,
*Element Output, directions=YES
E, S
**
** HISTORY OUTPUT: H-Output-1
**
*Output, history, variable=PRESELECT
*End Step
